<?xml version="1.0"?>
<!--
  File:     Volvo RM8B.xml
  Author:   Nikolai V. Chr.

  Inputs:
    name:           Volvo RM8B (JT8D-17A with afterburner)
    type:           turbine
    thrust:         16200 lb
    augmented?      yes
    injected?       no
-->

<turbine_engine name="Volvo RM8B">
  <milthrust unit="LBS"> 16200.0 </milthrust><!-- from page 5, Australian document -->
  <maxthrust unit="LBS"> 28110.0 </maxthrust><!-- from page 5, Australian document -->
  <!--<milthrust unit="N"> 73500.0 </milthrust> Newton must be multiplied by factor 10 to work (bug)
  <maxthrust unit="N"> 127500.0 </maxthrust>-->
  <bypassratio>     0.97 </bypassratio> <!-- Turbofan and turbojet engines: database handbook. - JT8D-17A: 1.02. But RM8A is 1.07 and RM8B is 0.97 -->
  <tsfc>            0.64 </tsfc><!-- from page 5, Australian document -->
  <atsfc>           2.52 </atsfc><!-- from page 5, Australian document -->
  <bleed>           0.03</bleed><!-- -->
  <idlen1>         22.0 </idlen1>
  <idlen2>         58.5 </idlen2><!-- http://www.boeing-727.com/ - JT8D-17A -->
  <maxn1>         102.4 </maxn1><!-- http://www.boeing-727.com/ -->
  <maxn2>         100.0 </maxn2><!-- http://www.boeing-727.com/ -->
  <augmented>         1 </augmented>
  <augmethod>         0 </augmethod> <!-- controlled from Nasal code -->
  <injected>          0 </injected>


  <!-- from table 4, Australian document. -->
  <function name="IdleThrust">
   <product>
     <value>0.000007716</value> <!-- 1/(16200 x 8) -->
     <table>
    <independentVar lookup="row">velocities/mach</independentVar>
    <independentVar lookup="column">atmosphere/density-altitude</independentVar>
    <tableData>
                   0    10000     20000    30000    40000    50000   60000
       0.0      8758     5154      3420     2283     1631        0       0
       0.4      7474     5154      3420     2283     1631        0       0
       0.6      6824     5140      3484     2380     1631        0       0
       0.7      6499     5130      3600     2428     1689        0       0
       0.8      6174     5120      3715     2476     1747        0       0
       0.9      5676     4989      3773     2562     1744        0       0
       1.0      4125     4281      3479     2301     1578        0       0
       1.1      1435     2370      2603     2061     1322        0       0
       1.2         0      458      1726     1821     1066        0       0
       1.4         0      229      1151     1214      800        0       0
       1.6         0        0       575      607      533        0       0
       1.8         0        0         0        0      267        0       0
       2.0         0        0         0        0        0        0       0
       2.2         0        0         0        0        0        0       0
       2.4         0        0         0        0        0        0       0
       2.6         0        0         0        0        0        0       0
    </tableData>
   </table>
  </product>
  </function>

  <!-- Calculated using the Stanford Engine Model for RM8B -->
  <function name="MilThrust">
   <product>
     <value>0.000077160494</value> <!-- 1/16200 x 1.25 The 1.25 factor is to convert cruise to maximum -->
     <table>
      <independentVar lookup="row">velocities/mach</independentVar>
      <independentVar lookup="column">atmosphere/density-altitude</independentVar>
      <tableData>
            -11181  -10000      0  10000  20000  30000  40000  50000  60000  70000
       0.0   16200   15865  13033  10201   7368   4938   2900    862      0      0
       0.2   13469   13224  11147   9070   6992   4990   3057   1123      0      0
       0.4   11413   11235   9727   8219   6711   5042   3213   1384      0      0
       0.6   10032    9899   8774   7648   6523   5095   3370   1646      0      0
       0.8    9326    9217   8287   7358   6428   5147   3527   1907    287      0
       1.0    9295    9187   8267   7347   6427   5199   3684   2168    653      0
       1.2    9939    9810   8713   7617   6520   5251   3840   2430   1019      0
       1.4   11259   11087   9626   8167   6707   5304   3997   2691   1384      0
       2.0   19267   18833  15165  11496   7828   5460   4468   3475   2482      0
      </tableData>
     </table>
   </product>
  </function>


  <!-- from table 4, Australian document. -->
  <function name="AugThrust">
  <product>
  <value>0.00004414799</value> <!-- 1/28110 x 1.241 The 1.241 factor is to convert cruise to maximum -->
   <table>
    <independentVar lookup="row">velocities/mach</independentVar>
    <independentVar lookup="column">atmosphere/density-altitude</independentVar>
    <tableData>
                0    10000   20000   30000   40000    50000    60000  70000
     0.0    22650    19435   14106    9040    6404     4570     3590      0
     0.4    24414    19435   14106    9040    6404     4570     3590      0
     0.6    26625    21123   15616   10795    6404     4570     3590      0
     0.7    27730    22431   16833   11673    6962     4570     3590      0
     0.8    28836    23740   18050   12550    7521     4922     3590      0
     0.9    30827    25187   19367   13709    8133     5273     3740      0
     1.0    32421    26582   20608   14880    8953     5865     3890      0
     1.1    45740    27386   22270   16521   10503     6428     4193      0
     1.2    37268    28190   23932   18162   12054     6990     4495      0
     1.4    37268    33991   29869   22261   15280     9151     4818      0
     1.6    37268    39792   35805   26359   18506    11313     5500      0
     1.8    37268    39792   41742   30458   21731    13121     6484      0
     2.0    37268    39792   41742   34431   24957    14928     7468      0
     2.2    37268    39792   41742   38404   28158    15608     8820      0
     2.4    37268    39792   41742   38404   31360    16288     8820      0
     2.6    37268    39792   41742   38404   31360    16968     8820      0
    </tableData>
   </table>
   </product>
  </function>

</turbine_engine>
